RT ≡ x  # error: This variable is undefined.
# initial guesses:
Λ_C := 1
Λ_H := 1
n := 1
y_CH4 := 0.04545
y_C2H6 := 0.04545
y_C3H8 := 0.04545
y_C4H10 := 0.04545
y_C5H12 := 0.04545
y_C6H14 := 0.04545
y_C7H16 := 0.04545
y_C8H18 := 0.04545
y_C2H4 := 0.04545
y_C3H6 := 0.04545
y_C4H8 := 0.04545
y_C5H10 := 0.04545
y_C6H12 := 0.04545
y_C7H14 := 0.04545
y_C8H16 := 0.04545
y_C6H6 := 0.04545
y_C7H8 := 0.04545
y_C8H10 := 0.04545
y_oC8H10 := 0.04545
y_mC8H10 := 0.04545
y_pC8H10 := 0.04545
y_H2 := 0.04545
# Solve block:
Given
y_CH4 + 2*y_C2H6 + 3*y_C3H8 + 4*y_C4H10 + 5*y_C5H12 + 6*y_C6H14 + 7*y_C7H16 + 8*y_C8H18 + 2*y_C2H4 + 3*y_C3H6 + 4*y_C4H8 + 5*y_C5H10 + 6*y_C6H12 + 7*y_C7H14 + 8*y_C8H16 + 6*y_C6H6 + 7*y_C7H8 + 8*y_C8H10 + 8*y_oC8H10 + 8*y_mC8H10 + 8*y_pC8H10 == 3/n
4*y_CH4 + 6*y_C2H6 + 8*y_C3H8 + 10*y_C4H10 + 12*y_C5H12 + 14*y_C6H14 + 16*y_C7H16 + 18*y_C8H18 + 4*y_C2H4 + 6*y_C3H6 + 8*y_C4H8 + 10*y_C5H10 + 12*y_C6H12 + 14*y_C7H14 + 16*y_C8H16 + 6*y_C6H6 + 8*y_C7H8 + 10*y_C8H10 + 10*y_oC8H10 + 10*y_mC8H10 + 10*y_pC8H10 + 2*y_H2 == 8/n
y_CH4 + y_C2H6 + y_C3H8 + y_C4H10 + y_C5H12 + y_C6H14 + y_C7H16 + y_C8H18 + y_C2H4 + y_C3H6 + y_C4H8 + y_C5H10 + y_C6H12 + y_C7H14 + y_C8H16 + y_C6H6 + y_C7H8 + y_C8H10 + y_oC8H10 + y_mC8H10 + y_pC8H10 + y_H2 == 1
ΔG/RT + ln(y_CH4) + Λ_C + 4*Λ_H == 0
ΔG/RT + ln(y_C2H6) + 2*Λ_C + 6*Λ_H == 0
ΔG/RT + ln(y_C3H8) + 3*Λ_C + 8*Λ_H == 0
ΔG/RT + ln(y_C4H10) + 4*Λ_C + 10*Λ_H == 0
ΔG/RT + ln(y_C5H12) + 5*Λ_C + 12*Λ_H == 0
ΔG/RT + ln(y_C6H14) + 6*Λ_C + 14*Λ_H == 0
ΔG/RT + ln(y_C7H16) + 7*Λ_C + 16*Λ_H == 0
ΔG/RT + ln(y_C8H18) + 8*Λ_C + 18*Λ_H == 0
ΔG/RT + ln(y_C2H4) + 2*Λ_C + 4*Λ_H == 0
ΔG/RT + ln(y_C3H6) + 3*Λ_C + 9*Λ_H == 0
ΔG/RT + ln(y_C4H8) + 4*Λ_C + 8*Λ_H == 0
ΔG/RT + ln(y_C5H10) + 5*Λ_C + 10*Λ_H == 0
ΔG/RT + ln(y_C6H12) + 6*Λ_C + 12*Λ_H == 0
ΔG/RT + ln(y_C7H14) + 7*Λ_C + 14*Λ_H == 0
ΔG/RT + ln(y_C8H10) + 8*Λ_C + 10*Λ_H == 0
ΔG/RT + ln(y_oC8H10) + 8*Λ_C + 10*Λ_H == 0
ΔG/RT + ln(y_mC8H10) + 8*Λ_C + 10*Λ_H == 0
ΔG/RT + ln(y_pC8H10) + 8*Λ_C + 10*Λ_H == 0
ln(y_H2) + 2*Λ_H == 0
0 ≤ y_CH4 ≤ 1
0 ≤ y_C2H6 ≤ 1
0 ≤ y_C3H8 ≤ 1
0 ≤ y_C4H10 ≤ 1
0 ≤ y_C5H12 ≤ 1
0 ≤ y_C6H14 ≤ 1
0 ≤ y_C7H14 ≤ 1
0 ≤ y_C8H16 ≤ 1
0 ≤ y_C2H4 ≤ 1
0 ≤ y_C3H6 ≤ 1
0 ≤ y_C4H8 ≤ 1
0 ≤ y_C5H10 ≤ 1
0 ≤ y_C6H12 ≤ 1
0 ≤ y_C7H14 ≤ 1
0 ≤ y_C8H16 ≤ 1
0 ≤ y_C6H6 ≤ 1
0 ≤ y_C7H8 ≤ 1
0 ≤ y_C8H10 ≤ 1
0 ≤ y_oC8H10 ≤ 1
0 ≤ y_mC8H10 ≤ 1
0 ≤ y_pC8H10 ≤ 1
0 ≤ y_H2 ≤ 1
Find(y_CH4, y_C2H6, y_C3H8, y_C4H10, y_C5H12, y_C6H14, y_C7H16, y_C8H18, y_C2H4, y_C3H6, y_C4H8, y_C5H10, y_C6H12, y_C7H14, y_C8H16, y_C6H6, y_C7H8, y_C8H10, y_oC8H10, y_mC8H10, y_pC8H10, y_H2, Λ_C, Λ_H, n) =  # error: This variable is undefined.
